// COMSOL Multiphysics 5.0.0.243 model "darcy-elder.mph"
// Outline of the model tree

Parameters
  L = 150[m]
  rho0 = 1000[kg/m^3]
  rho_s = 1200[kg/m^3]
  c0 = 0[mol/m^3]
  c_s = 1[mol/m^3]
  beta = (rho_s-rho0)/(c_s-c0)
  p0 = 0[atm]
  mu = 1e-3[Pa*s]
  kappa = 500[mD]
  epsilon = 0.1
  D_L = 3.56e-6[m^2/s]
  Pe = beta*(c_s-c0)*g_const*kappa*L/(mu*epsilon*D_L)

Variables
  var1 "Var1"
    rho = rho0+beta*c*(c>0)

Geometry
  geom1 "Geo1" (2D, length unit m)
    r1: Rectangle "R1" | size = {2*L, L}
    pt1: Point "P1" | p = {L, L}
    fin: Finalize "Form Union"

Physics
  dl: DarcysLaw on all domains
    dependent variable p
    GravityEffects.GravityEffects = on
    GravityEffects.D = y-L
    dlm1: DarcysLawModel "Fluid and Matrix Properties 1" (default)
      rho_mat = userdef
      rho = rho
      mu_mat = userdef
      mu = mu
      kappa_mat = userdef
      kappa = kappa
      epsilon_mat = userdef
      epsilon = epsilon
    nf1: NoFlow (default)
    init1: init "Initial Values 1" (default)
  tds: DilutedSpeciesPorousMedia "Transport of Diluted Species in Porous Media" on all domains
    dependent variable c
    pmtp1: PorousMediaTransportProperties (default)
    nflx1: NoFlux (default)
    init1: init "Initial Values 1" (default)

Mesh
  mesh1 "Mesh 1" (physics-controlled)
    size: MeshSizeDefault | hauto = 5

Studies
  std1 "Study 1"
    time: Transient "Time Dependent" | tlist = range(0,0.1,1)